// SBML level 3 version 1

model main()
  // model units - substance: mole, time: second, extent: mole

  // Compartments:
  compartment c1 = 1 litre;

  // Species:
  species mRNA1 in c1 = 0;
  species Pep1 in c1 = 0;
  species mRNA2 in c1 = 0;
  species Pep2 in c1 = 0;
  species mRNA3 in c1 = 0;
  species Pep3 in c1 = 0;

  // Parameters:
  syn_mRNA1 = 7.58e-6 molperLmin;
  syn_mRNA2 = 7.2e-6 molperLmin;
  syn_mRNA3 = 8.76e-6 molperLmin;
  syn_Pep = 2.07e-5 per_min;
  deg_Pep = 0.00538 per_min;
  Pep1max = 4.87e-10 molperL;
  Pep2max = 1.11e-5 molperL;
  Kleak = 8.96e-6 molperLmin;
  Kleak1 = 2.08e-6 molperLmin;
  deg_mRNA = 0.1386 per_min;
  state1 = 1 Dimension_less;
  state2 = 1 Dimension_less;

  // Rate rules:
  mRNA1' = Kleak1 + syn_mRNA1*state1 - deg_mRNA*mRNA1;
  Pep1' = syn_Pep*mRNA1 - deg_Pep*Pep1;
  mRNA2' = syn_mRNA2*state2 - deg_mRNA*mRNA2;
  Pep2' = syn_Pep*mRNA2 - deg_Pep*Pep2;
  mRNA3' = Kleak + syn_mRNA3*(Pep1/Pep1max)*(Pep2/Pep2max) - deg_mRNA*mRNA3;
  Pep3' = syn_Pep*mRNA3 - deg_Pep*Pep3;

  // Unit definitions:
  unit per_second = 1 / second;
  unit per_min = 1 / (60 second);
  unit molperLmin = mole / (litre * 60 second);
  unit molperL = mole / litre;
  unit Dimension_less = (0 dimensionless)^0;
end
