// SBML level 3 version 1

model main()
  // model units - substance: mole, time: second, extent: mole

  // Compartments:
  compartment c1 = 1 litre;

  // Species:
  species mRNA1 in c1 = 0;
  species Pep1 in c1 = 0;
  species mRNA2 in c1 = 0;
  species Pep2 in c1 = 0.0001684596;

  // Parameters:
  syn_mRNA1 = 2.013792e-6 molperLmin;
  syn_mRNA2 = 3.595064e-5 molperLmin;
  syn_Pep = 0.007944358 per_min;
  deg_Pep = 0.0102452 per_min;
  Kmaxrep = 0.9988373 Dimension_less;
  Pepmax = 1.312976e-5 molperL;
  deg_mRNA = 0.1386 per_min;
  state = 1 Dimension_less;

  // Rate rules:
  mRNA1' = syn_mRNA1*state - deg_mRNA*mRNA1;
  Pep1' = syn_Pep*mRNA1 - deg_Pep*Pep1;
  mRNA2' = syn_mRNA2*(1 - Kmaxrep*(Pep1/Pepmax)) - deg_mRNA*mRNA2;
  Pep2' = syn_Pep*mRNA2 - deg_Pep*Pep2;

  // Unit definitions:
  unit per_second = 1 / second;
  unit per_min = 1 / (60 second);
  unit molperLmin = mole / (litre * 60 second);
  unit molperL = mole / litre;
  unit Dimension_less = (0 dimensionless)^0;
end
